shell           mkdir logs
log             logs/liggghts

variable dt     equal 1e-6
variable dt_s	equal .02
variable dt_r	equal .25
variable dt_t   equal .001
variable dt_avg equal .001

variable saveI  equal ${dt_s}/${dt}
variable saveR  equal ${dt_r}/${dt}
variable saveT  equal ${dt_t}/${dt}
variable dts_avg equal ${dt_avg}/${dt}
variable t      equal dt*step

atom_style      granular
atom_modify     map array
communicate     single vel yes

boundary        f f f
newton          off

units           si
processors      2 3 2

# read the restart file
read_restart    dump/restart/restart.0.liggghts

include	        matprops.lmp
neighbor        ${dp} bin
neigh_modify    delay 0

# timestep, gravity
timestep        ${dt}
fix	            gravi all gravity 9.81 vector 0. -1. 0.

# walls
include         geometry.lmp

# cfd coupling
fix             cfd1 all couple/cfd                 couple_every 50 mpi
fix             cfd2 all couple/cfd/force/implicit

# apply nve integration to all particles that are inserted as single particles
fix             integr  all nve/sphere
fix             balance all balance 4000 xy 10 1.05
include         analytics.lmp

thermo_style    custom v_t step atoms ke
thermo          ${saveT}
thermo_modify   lost ignore norm no

dump            dmp all  custom/vtk ${saveI} dump/dump.*.vtp id x y z vx vy vz
dump_modify     dmp binary yes
#dump_modify     dmp compressor zlib

restart		    ${saveR} dump/restart/restart.A dump/restart/restart.B

run             0
